*Heading
** Job name: Job_PE_EE Model name: Structural
** Generated by: Abaqus/CAE 2021
*Preprint, echo=NO, model=NO, history=NO, contact=NO
**
** PARTS
**
*Part, name=Part
*Node
      1,           0.,           0., 9.99999975e-05
      2,           0., 0.00499999989, 9.99999975e-05
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*Element, type=C3D8R
   1,  310,  561, 2962,  213,    1,   17,  114,    4
   2,  561,  562, 2963, 2962,   17,   18,  113,  114
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*Nset, nset=Set_deposition, generate
     1,  10925,      1
*Elset, elset=Set_deposition, generate
    1,  6621,     1
** Section: Section-1
*Solid Section, elset=Set_deposition, material=Ti-6Al-4V
,
*End Part
**
**
** ASSEMBLY
**
*Assembly, name=Assembly
**
*Instance, name=Part-1, part=Part
*End Instance
**
*Nset, nset=Set-1, instance=Part-1
    1,    2,    3,    4,    5,    6
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*Elset, elset=Set-1, instance=Part-1, generate
    1,  2500,     1
*Elset, elset=Set-2, instance=Part-1, generate
 3201,  6400,     1
*Elset, elset=_AM-Model-1__AllBuildParts__, internal, instance=Part-1, generate
    1,  6621,     1
*Nset, nset=_PickedSet12, internal, instance=Part-1
    13,    14,    15,    16,   485,   486
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*Elset, elset=_PickedSet12, internal, instance=Part-1, generate
 2501,  6621,     1
*Elset, elset=_Surf-all_S3, internal, instance=Part-1, generate
    1,  2500,     1
*Surface, type=ELEMENT, name=Surf-all
_Surf-all_S3, S3
*ELEMENT PROGRESSIVE ACTIVATION,NAME="__AM-Model-1_Material Source -1_EPA__",ELSET=_AM-Model-1__AllBuildParts__,FOLLOW=No
*End Assembly
**
** MATERIALS
**
*Material, name=Ti-6Al-4V
*Conductivity
    7., 298.
 10.15, 573.
  15.5, 973.
   21.,1268.
  23.7,1573.
  30.9,1923.
  34.6,1973.
*Density
  4420., 298.
  4381., 573.
  4324., 973.
  4282.,1268.
  4240.,1573.
 4054.5,1923.
  3886.,1973.
*Elastic
 1.048e+11, 0.31
*Expansion
 2.86e-06, 298.
 3.76e-06, 572.
 5.06e-06, 977.
 6.83e-06,1268.
 7.76e-06,1577.
 8.57e-06,1925.
 8.99e-06,1972.
*Plastic
  1.05e+09,   0.
  1.05e+09, 0.01
 1.145e+09, 0.02
  1.16e+09, 0.03
 1.165e+09, 0.04
*Specific Heat
546., 298.
606., 573.
694., 973.
697.,1268.
696.,1573.
795.,1923.
840.,1973.
**
** PHYSICAL CONSTANTS
**
*Physical Constants, absolute zero=0., stefan boltzmann=5.67e-08
**
** BOUNDARY CONDITIONS
**
** Name: BC-1 Type: Symmetry/Antisymmetry/Encastre
*Boundary
_PickedSet12, ENCASTRE
**------------------------------------------------------------
**--------Table Types Defined in the Abaqus AM-Interface------
**------------------------------------------------------------
*PROPERTY TABLE TYPE, NAME = "ABQ_AM.AbsorptionCoeff" , PROPERTIES = 1
"AbsorptionCoeff", Unitless
*PROPERTY TABLE TYPE, NAME = "ABQ_AM.EnclosureAmbientTemp" , PROPERTIES = 1
"VATTemperature",
*PARAMETER TABLE TYPE, NAME = "ABQ_AM.MovingHeatSource" , PARAMETERS = 2
STRING,,"Event Series","Laser Event Series",
STRING,,Concentrated|Uniform|Goldak,"Energy Distribution",
*PARAMETER TABLE TYPE, NAME = "ABQ_AM.MaterialDeposition.Advanced" , PARAMETERS = 3
STRING,Partial,Full|Partial,"Activation Type",
FLOAT,0.0,,"Activation Threshold",
FLOAT,1.0,,"Max Volume fraction",
*PARAMETER TABLE TYPE, NAME = "ABQ_AM.MovingHeatSource.Uniform" , PARAMETERS = 9
INTEGER,,,"SubDivX",
INTEGER,,,"SubDivY",
INTEGER,,,"SubDivZ",
FLOAT,,,"offset1",
FLOAT,,,"offset2",
FLOAT,,,"offset3",
FLOAT,,,"BoxLength1",
FLOAT,,,"BoxLength2",
FLOAT,,,"BoxLength3",
*PARAMETER TABLE TYPE, NAME = "ABQ_AM.MovingHeatSource.Goldak" , PARAMETERS = 10
INTEGER,,,"SubDivX",
INTEGER,,,"SubDivY",
INTEGER,,,"SubDivZ",
FLOAT,,,"a",
FLOAT,,,"b",
FLOAT,,,"cf",
FLOAT,,,"cr",
FLOAT,,,"ff",
FLOAT,,,"fr",
FLOAT,,,"BoxSizeFactor",
*PARAMETER TABLE TYPE, NAME = "ABQ_AM.MovingHeatSource.Advanced" , PARAMETERS = 7
STRING,False,True|False,"Conserve Total Energy",
STRING,False,True|False,"Control increment size",
STRING,Relative,Absolute|Relative,"Offset type",
FLOAT,0.0,,"LaserVectorX",
FLOAT,0.0,,"LaserVectorY",
FLOAT,-1.0,,"LaserVectorZ",
FLOAT,1.0,,"Field factor",
*PARAMETER TABLE TYPE, NAME = "ABQ_AM.MaterialDeposition.Bead" , PARAMETERS = 5
STRING,Z,X|Y|Z,"Stack Direction",
FLOAT,,,"Bead Height",
FLOAT,,,"Bead Width",
FLOAT,,,"Activation Offset",
STRING,,Below|Above,"Deposition Position",
*PARAMETER TABLE TYPE, NAME = "ABQ_AM.MaterialDeposition" , PARAMETERS = 2
STRING,,"Event Series","Material Event Series",
STRING,,Roller|Bead,"Deposition Process",
*Event Series Type, FIELDS = 1, NAME = "ABQ_AM.MaterialDeposition"
"On and off", Unitless
*Event Series Type, FIELDS = 1, NAME = "ABQ_AM.PowerMagnitude"
"Power", ML2T03
**------------------------------------------------------------
**-------Event Series defined in the Abaqus AM-Interface------
**------------------------------------------------------------
*EVENT SERIES, NAME = "RollerPath" , TIME =TOTAL TIME,
	TYPE = "ABQ_AM.MaterialDeposition",
	INPUT = "RP5.txt"
*EVENT SERIES, NAME = "PowerPath" , TIME =TOTAL TIME,
	TYPE = "ABQ_AM.PowerMagnitude",
	INPUT = "PP5.txt"
**------------------------------------------------------------
**-----Table Collections defined in the Abaqus AM-Interface---
**------------------------------------------------------------
*TABLE COLLECTION, NAME = "ABQ_AM_Table Collection-1"
*PROPERTY TABLE, TYPE = "ABQ_AM.EnclosureAmbientTemp"
**tempDependency = OFF
473
*PROPERTY TABLE, TYPE = "ABQ_AM.AbsorptionCoeff"
**tempDependency = OFF
0.35
*PARAMETER TABLE, TYPE = "ABQ_AM.MovingHeatSource"
"PowerPath", "Goldak"
*PARAMETER TABLE, TYPE = "ABQ_AM.MaterialDeposition"
"RollerPath", "Roller"
*PARAMETER TABLE, TYPE = "ABQ_AM.MovingHeatSource.Goldak"
4, 4, 2, 0.0001, 0.0001, 0.0001, 0.0001, 0.66667, 1.33333, 1
** ----------------------------------------------------------------
**
** STEP: Step_structural
**
*Step, name=Step_structural, nlgeom=YES, inc=3110
*Static, direct
0.0002, 0.62,
*ACTIVATE ELEMENTS , ACTIVATION = "__AM-Model-1_Material Source -1_EPA__"
"ABQ_AM_Table Collection-1"
**
** PREDEFINED FIELDS
**
** Name: Predefined Field-1   Type: Temperature
*Temperature, file=I:\SLM\Job_TEMP.odb, bstep=1, binc=1, estep=1, einc=5000
**
** OUTPUT REQUESTS
**
*Restart, write, frequency=0
**
** FIELD OUTPUT: F-Output-1
**
*Output, field
*Element Output, directions=YES
EE, PE, PEEQ
**
** HISTORY OUTPUT: H-Output-1
**
*Output, history, variable=PRESELECT
*OUTPUT,FIELD,FREQ=1
*ELEMENT OUTPUT
EACTIVE
*End Step
