*Heading
** Job name: Job_PE_EE_cooling Model name: Structural_cooling
** Generated by: Abaqus/CAE 2021
*Preprint, echo=NO, model=NO, history=NO, contact=NO
**
** PARTS
**
*Part, name=Part
*Node
      1,           0.,           0., 9.99999975e-05
      2,           0., 0.00499999989, 9.99999975e-05
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*Element, type=C3D8R
   1,  310,  561, 2962,  213,    1,   17,  114,    4
   2,  561,  562, 2963, 2962,   17,   18,  113,  114
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*Nset, nset=Set_deposition, generate
     1,  10925,      1
*Elset, elset=Set_deposition, generate
    1,  6621,     1
** Section: Section-1
*Solid Section, elset=Set_deposition, material=Ti-6Al-4V
,
*End Part
**
**
** ASSEMBLY
**
*Assembly, name=Assembly
**
*Instance, name=Part-1, part=Part
*End Instance
**
*Nset, nset=Set-1, instance=Part-1
    1,    2,    3,    4,    5,    6
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*Elset, elset=Set-1, instance=Part-1, generate
    1,  2500,     1
*Elset, elset=Set-2, instance=Part-1, generate
 3201,  6400,     1
*Elset, elset=_AM-Model-1__AllBuildParts__, internal, instance=Part-1, generate
    1,  6621,     1
*Nset, nset=_PickedSet12, internal, instance=Part-1
    13,    14,    15,    16,   485,   486
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*Elset, elset=_PickedSet12, internal, instance=Part-1, generate
 2501,  6621,     1
*Elset, elset=_Surf-all_S3, internal, instance=Part-1, generate
    1,  2500,     1
*Surface, type=ELEMENT, name=Surf-all
_Surf-all_S3, S3
*End Assembly
**
** MATERIALS
**
*Material, name=Ti-6Al-4V
*Conductivity
    7., 298.
 10.15, 573.
  15.5, 973.
   21.,1268.
  23.7,1573.
  30.9,1923.
  34.6,1973.
*Density
  4420., 298.
  4381., 573.
  4324., 973.
  4282.,1268.
  4240.,1573.
 4054.5,1923.
  3886.,1973.
*Elastic
 1.048e+11, 0.31
*Expansion
 2.86e-06, 298.
 3.76e-06, 572.
 5.06e-06, 977.
 6.83e-06,1268.
 7.76e-06,1577.
 8.57e-06,1925.
 8.99e-06,1972.
*Plastic
  1.05e+09,   0.
  1.05e+09, 0.01
 1.145e+09, 0.02
  1.16e+09, 0.03
 1.165e+09, 0.04
*Specific Heat
546., 298.
606., 573.
694., 973.
697.,1268.
696.,1573.
795.,1923.
840.,1973.
**
** PHYSICAL CONSTANTS
**
*Physical Constants, absolute zero=0., stefan boltzmann=5.67e-08
**
** BOUNDARY CONDITIONS
**
** Name: BC-1 Type: Symmetry/Antisymmetry/Encastre
*Boundary
_PickedSet12, ENCASTRE
** ----------------------------------------------------------------
**
** STEP: Step_structural
**
*Step, name=Step_structural, nlgeom=YES, inc=3110
*Static, direct
1., 100.,
**
** PREDEFINED FIELDS
**
** Name: Predefined Field-1   Type: Temperature
*Temperature, file=I:\SLM\Job_TEMP_cooling.odb, bstep=1, binc=1, estep=1, einc=100
**
** OUTPUT REQUESTS
**
*Restart, write, frequency=0
**
** FIELD OUTPUT: F-Output-1
**
*Output, field
*Element Output, directions=YES
EE, PE, PEEQ
**
** HISTORY OUTPUT: H-Output-1
**
*Output, history, variable=PRESELECT
*End Step
