*Heading
** Job name: Job_TEMP_cooling Model name: Thermal_cooling
** Generated by: Abaqus/CAE 2021
*Preprint, echo=NO, model=NO, history=NO, contact=NO
**
** PARTS
**
*Part, name=Part
*Node
      1,           0.,           0., 9.99999975e-05
      2,           0., 0.00499999989, 9.99999975e-05
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*Element, type=DC3D8
   1,  310,  561, 2962,  213,    1,   17,  114,    4
   2,  561,  562, 2963, 2962,   17,   18,  113,  114
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*Nset, nset=Set_deposition, generate
     1,  10925,      1
*Elset, elset=Set_deposition, generate
    1,  6621,     1
** Section: Section-1
*Solid Section, elset=Set_deposition, material=Ti-6Al-4V
,
*End Part
**
**
** ASSEMBLY
**
*Assembly, name=Assembly
**
*Instance, name=Part-1, part=Part
*End Instance
**
*Nset, nset=Set-1, instance=Part-1
    1,    2,    3,    4,    5,    6
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*Elset, elset=Set-1, instance=Part-1, generate
    1,  2500,     1
*Elset, elset=Set-2, instance=Part-1, generate
 3201,  6400,     1
*Elset, elset=_AM-Model-1__AllBuildParts__, internal, instance=Part-1, generate
    1,  6621,     1
*Elset, elset=_Surf-all_S3, internal, instance=Part-1, generate
    1,  2500,     1
*Surface, type=ELEMENT, name=Surf-all
_Surf-all_S3, S3
*End Assembly
**
** MATERIALS
**
*Material, name=Ti-6Al-4V
*Conductivity
    7., 298.
 10.15, 573.
  15.5, 973.
   21.,1268.
  23.7,1573.
  30.9,1923.
  34.6,1973.
*Density
  4420., 298.
  4381., 573.
  4324., 973.
  4282.,1268.
  4240.,1573.
 4054.5,1923.
  3886.,1973.
*Elastic
 1.048e+11, 0.31
*Expansion
 2.86e-06, 298.
 3.76e-06, 572.
 5.06e-06, 977.
 6.83e-06,1268.
 7.76e-06,1577.
 8.57e-06,1925.
 8.99e-06,1972.
*Plastic
  1.05e+09,   0.
  1.05e+09, 0.01
 1.145e+09, 0.02
  1.16e+09, 0.03
 1.165e+09, 0.04
*Specific Heat
546., 298.
606., 573.
694., 973.
697.,1268.
696.,1573.
795.,1923.
840.,1973.
**
** PHYSICAL CONSTANTS
**
*Physical Constants, absolute zero=0., stefan boltzmann=5.67e-08
**
** PREDEFINED FIELDS
**
** Name: IniTemp   Type: Temperature
*Initial Conditions, type=TEMPERATURE, file=I:\SLM\Job_TEMP.odb, step=1, inc=6200
** ----------------------------------------------------------------
**
** STEP: Step_thermal
**
*Step, name=Step_thermal, nlgeom=NO, inc=3110
*Heat Transfer, end=PERIOD
1., 100., , ,
**
** INTERACTIONS
**
** Interaction: convenction
*Sfilm
Surf-all, F, 473., 22.5
** Interaction: radiation
*Sradiate
Surf-all, R, 473., 0.7
**
** OUTPUT REQUESTS
**
*Restart, write, frequency=0
**
** FIELD OUTPUT: F-Output-1
**
*Output, field
*Element Output, directions=YES
TEMP,
*Output, history, frequency=0
*End Step
